# INITIALIZATION
clear
units metal
dimension 3
boundary p p p
atom_style atomic
atom_modify map array

# ATOM DEFINITION
lattice fcc 4.0000 orient x 1 0 0 orient y 0 1 0 orient z 0 0 1
region box block 0 1 0 1 0 1 units lattice
create_box 1 box
create_atoms 1 box
replicate 1 1 1

# DEFINE INTERATOMIC POTENTIAL
pair_style eam/alloy
pair_coeff * * Al99.eam.alloy Al
neighbor 2.0 bin
neigh_modify delay 10 check yes

# DEFINE COMPUTES & VARIABLES
compute eng all pe/atom
compute eatoms all reduce sum c_eng

variable natoms equal "count(all)"
variable teng equal "c_eatoms"
variable length equal "lx"
variable ecoh equal "v_teng/v_natoms"

# RUN MINIMIZATION
reset_timestep 0
thermo 10
thermo_style custom step pe press c_eatoms v_ecoh etotal
min_style cg
minimize 1e-25 1e-25 5000 10000

print "DATA_CAPTURE: LatConst = 4.0000 | FinalPE = ${teng} | Press = ${press} | Ecoh = ${ecoh}"
